# RESOLUCION DE VIGAS ISOSTATICAS
# RESOLVER LA SIGUIENTE VIGA:
w := 700
a := 5
b := 4
c := 1
L := a + b + c = 10
# 1°DIAGRAMA DE CUERPO LIBRE
# 2° CALCULAR LAS REACCIONES
B_y := -w*b*(a + b/2) + B_y*L == 0 solve, B_y → 1960
A_y := A_y - w*b + B_y == 0 solve, A_y → 840
A_y = 840
B_y = 1960
x := 0, 0.01 .. L
V(x) := A_y - (a < x < a + b)*(w*(x - a)) - (x ≥ a + b)*(w*b)
M(x) := A_y*x - (a < x < a + b)*(w*(x - a))*((x - a)/2) - (x ≥ a + b)*(w*b)*(x - (a + b/2))
# [plot: V(x) vs x]
# [plot: M(x) vs x]
