# EJERCICIO 01
# DATOS:
q := 15 kg/m
P_1 := 20 kg
P_2 := 8 kg
M := 10 kg*m
a := 2 m
b := 1 m
c := 1 m
d := 1 m
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# CALCULO DE REACCIONES
# Solución:
sum(M_A) == 0
V_D := q*a^2/2 + M + P_1*(a + b) - V_D*(a + b + c) + P_2*(a + b + c + d) == 0 solve, V_D → 35*kg
V_D := 35 kg
V_D = 35 kg
sum(F_y) == 0
V_A := V_A - q*a - P_1 + V_D - P_2 == 0 solve, V_A → 23*kg
V_A := 23 kg
V_A = 23 kg
# SECCIONES
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M(x) := V_A*x - (a > x > 0)*q*x^2/2 - (x ≥ a)*q*a*(x - a/2) + (x ≥ a)*M - (x ≥ (a + b))*P_1*(x - (a + b)) + (x ≥ (a + b + c))*V_D*(x - (a + b + c))
Q(x) := V_A - (a > x > 0)*q*x - (x ≥ a)*q*a - (x ≥ (a + b))*P_1 + (x ≥ (a + b + c))*V_D - (x ≥ (a + b + c + d))*P_2
x := 0 m, 0.001 m .. (a + b + c + d)
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M(x) = [
    0; 0.0229925; 0.04597; 0.0689325; 0.09188; 0.114813; 0.13773; 0.160633; 0.18352; 0.206393; 0.22925; 0.252092
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] kg*m
Q(x) = [
    23; 22.985; 22.97; 22.955; 22.94; 22.925; 22.91; 22.895; 22.88; 22.865; 22.85; 22.835
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] kg
# [plot: Q(x) vs x]
# [plot: M(x) vs x]
