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L_1 := 1 m
L_2 := 1 m
L_3 := 1 m
L_4 := 1 m
L_5 := 1 m
L_6 := 1 m
L_7 := 0 m
L_8 := 0 m
L_9 := 0 m
L_10 := 0 m
x_0 := 0.0 m
x_1 := L_1
x_2 := x_1 + L_2
x_3 := x_2 + L_3
x_4 := x_3 + L_4
x_5 := x_4 + L_5
x_6 := x_5 + L_6
x_7 := x_6 + L_7
x_8 := x_7 + L_8
x_9 := x_8 + L_9
x_10 := x_9 + L_10
L_tot := x_10
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q_1 := 10 kg/m
q_2 := 0 kg/m
q_3 := 15 kg/m
q_4 := 0 kg/m
q_5 := 0 kg/m
q_6 := 0 kg/m
q_7 := 0 kg/m
q_8 := 0 kg/m
q_9 := 0 kg/m
q_10 := 0 kg/m
P_0 := 0 kg
P_1 := 0 kg
P_2 := 0 kg
P_3 := 0 kg
P_4 := 0 kg
P_5 := 0 kg
P_6 := 20 kg
P_7 := 0 kg
P_8 := 0 kg
P_9 := 0 kg
P_10 := 0 kg
M_0 := 0*(kg*m)
M_1 := 10*(kg*m)
M_2 := 0*(kg*m)
M_3 := 0*(kg*m)
M_4 := 0*(kg*m)
M_5 := 0*(kg*m)
M_6 := 0*(kg*m)
M_7 := 0*(kg*m)
M_8 := 0*(kg*m)
M_9 := 0*(kg*m)
M_10 := 0*(kg*m)
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V_D := 31.8750 kg
V_A := 13.1250 kg
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M(x) := (x ≥ x_1)*V_A*(x - x_1) + (x ≥ x_5)*V_D*(x - x_5) - (x_1 > x > x_0)*q_1*x^2/2 - (x ≥ x_1)*q_1*L_1*(x - L_1/2) - (x_3 > x > x_2)*q_3*(x - x_2)^2/2 - (x ≥ x_3)*q_3*L_3*(x - (x_2 + L_3/2)) + (x ≥ x_1)*M_1 - (x ≥ x_6)*P_6*(x - x_6)
Q(x) := (x ≥ x_1)*V_A + (x ≥ x_5)*V_D - (x_1 > x > x_0)*q_1*x - (x ≥ x_1)*q_1*L_1 - (x_3 > x > x_2)*q_3*(x - x_2) - (x ≥ x_3)*q_3*L_3 - (x ≥ x_6)*P_6
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x := 0.0 m, 0.001 m .. L_tot
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# [plot: Q(x) vs x]
# [plot: M(x) vs x]
